$PROB    BOLUS_1CPT_VCL SINGLE DOSE FOCE INTER (120 Ind/2276 Obs) runR001
$INPUT   ID TIME DV=DROP LNDV=DV MDV AMT EVID DOSE VI CLI SSX IIX SD CMT
$DATA    BOLUS_1CPT.csv IGNORE=@ IGNORE (SD.EQ.0)
$SUBR    ADVAN1,TRANS2
$PK
         CL=THETA(1)*EXP(ETA(1))
         V=THETA(2)*EXP(ETA(2))
         S1=V
$ERROR   (ONLY OBSERVATIONS)
         IPRED=LOG(0.0025)
         W=THETA(3)
         IF (F.GT.0) IPRED=LOG(F)
         IRES=IPRED-DV
         IWRES=IRES/W
         Y=IPRED+W*ERR(1)
$THETA   (0,5,15) (0,90,200) (0,0.3,1)
;#       CL V RSV
$OMEGA   0.15 0.15
;#       IIV_CL IIV_V
$SIGMA   1 FIX
;#       RSV_FIX
$EST     NSIG=3 PRINT=5 MAX=9999 NOABORT POSTHOC METHOD=COND INTER NOOBT
$COV
$TABLE  ID TIME LNDV MDV AMT EVID DOSE VI CLI CL V ETA1 ETA2
        IPRED IRES IWRES CWRESI
        ONEHEADER NOPRINT FILE=runR001.csv
