Run Start Date:  04/02/2021
Run Start Time: 17:29:17.86
Run Stop Date:   04/02/2021
Run Stop Time:  17:29:35.21

********************                            CONTROL STREAM                                      ********************

$PROB    BOLUS_1CPT_VCL SINGLE DOSE FOCE INTER (120 Ind/2276 Obs) runR001
$INPUT   ID TIME DV=DROP LNDV=DV MDV AMT EVID DOSE VI CLI SSX IIX SD CMT
$DATA    BOLUS_1CPT.csv IGNORE=@ IGNORE (SD.EQ.0)
$SUBR    ADVAN1,TRANS2
$PK
         CL=THETA(1)*EXP(ETA(1))
         V=THETA(2)*EXP(ETA(2))
         S1=V
$ERROR   (ONLY OBSERVATIONS)
         IPRED=LOG(0.0025)
         W=THETA(3)
         IF (F.GT.0) IPRED=LOG(F)
         IRES=IPRED-DV
         IWRES=IRES/W
         Y=IPRED+W*ERR(1)
$THETA   (0,5,15) (0,90,200) (0,0.3,1)
;#       CL V RSV
$OMEGA   0.15 0.15
;#       IIV_CL IIV_V
$SIGMA   1 FIX
;#       RSV_FIX
$EST     NSIG=3 PRINT=5 MAX=9999 NOABORT POSTHOC METHOD=COND INTER NOOBT
$COV
$TABLE  ID TIME LNDV MDV AMT EVID DOSE VI CLI CL V ETA1 ETA2
        IPRED IRES IWRES CWRESI
        ONEHEADER NOPRINT FILE=runR001.csv

********************                            SYSTEM INFORMATION                                  ********************

Operating system:

Microsoft Windows [Version 10.0.19042.746]

Compiler: Intel(R) Parallel Studio XE 2015 Update 3 Composer Edition (package 208)

Compiler settings: /Gs /nologo /nbs /w /fp:strict

********************                            NMTRAN MESSAGES                                     ********************

 WARNINGS AND ERRORS (IF ANY) FOR PROBLEM    1
 (WARNING  2) NM-TRAN INFERS THAT THE DATA ARE POPULATION.
********************                            RUNNING MPI                                         ********************
mpiexec -hosts 1 localhost 1 -noprompt nonmem.exe runR001.ctl -licfile=c:\nm750\license\nonmem.lic -parafile=C:\MPI\node6.pnm : ^
-wdir c:\MPI\worker1 -hosts 1 localhost 1 -noprompt nonmem.exe runR001.ctl -licfile=c:\nm750\license\nonmem.lic -worker : ^
-wdir c:\MPI\worker2 -hosts 1 localhost 1 -noprompt nonmem.exe runR001.ctl -licfile=c:\nm750\license\nonmem.lic -worker : ^
-wdir c:\MPI\worker3 -hosts 1 localhost 1 -noprompt nonmem.exe runR001.ctl -licfile=c:\nm750\license\nonmem.lic -worker : ^
-wdir c:\MPI\worker4 -hosts 1 localhost 1 -noprompt nonmem.exe runR001.ctl -licfile=c:\nm750\license\nonmem.lic -worker : ^
-wdir c:\MPI\worker5 -hosts 1 localhost 1 -noprompt nonmem.exe runR001.ctl -licfile=c:\nm750\license\nonmem.lic -worker
********************                            NONMEM EXECUTION                                    ********************

1NONLINEAR MIXED EFFECTS MODEL PROGRAM (NONMEM) VERSION 7.5.0
 ORIGINALLY DEVELOPED BY STUART BEAL, LEWIS SHEINER, AND ALISON BOECKMANN
 CURRENT DEVELOPERS ARE ROBERT BAUER, ICON DEVELOPMENT SOLUTIONS,
 AND ALISON BOECKMANN. IMPLEMENTATION, EFFICIENCY, AND STANDARDIZATION
 PERFORMED BY NOUS INFOSYSTEMS.
 PROBLEM NO.:         1
 BOLUS_1CPT_VCL SINGLE DOSE FOCE INTER (120 Ind/2276 Obs) runR001
 TOT. NO. OF OBS RECS:     2276
 TOT. NO. OF INDIVIDUALS:      120
 ONE COMPARTMENT MODEL (ADVAN1)
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 #TBLN:      1
 #METH: First Order Conditional Estimation with Interaction
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
 #TERM:
0MINIMIZATION SUCCESSFUL
 NO. OF FUNCTION EVALUATIONS USED:      114
 NO. OF SIG. DIGITS IN FINAL EST.:  3.0

 ETABAR IS THE ARITHMETIC MEAN OF THE ETA-ESTIMATES,
 AND THE P-VALUE IS GIVEN FOR THE NULL HYPOTHESIS THAT THE TRUE MEAN IS 0.

 ETABAR:         4.7657E-04 -1.5163E-03
 SE:             2.3984E-02  2.7193E-02
 N:                     120         120

 P VAL.:         9.8415E-01  9.5553E-01

 ETASHRINKSD(%)  1.3722E+00  1.4618E+00
 ETASHRINKVR(%)  2.7255E+00  2.9021E+00
 EBVSHRINKSD(%)  1.5800E+00  1.7629E+00
 EBVSHRINKVR(%)  3.1350E+00  3.4947E+00
 RELATIVEINF(%)  9.6812E+01  9.6453E+01
 EPSSHRINKSD(%)  5.2203E+00
 EPSSHRINKVR(%)  1.0168E+01


 TOTAL DATA POINTS NORMALLY DISTRIBUTED (N):         2276
 N*LOG(2PI) CONSTANT TO OBJECTIVE FUNCTION:    4183.00820314767
 OBJECTIVE FUNCTION VALUE WITHOUT CONSTANT:   -4126.11481640313
 OBJECTIVE FUNCTION VALUE WITH CONSTANT:       56.8933867445448
 REPORTED OBJECTIVE FUNCTION DOES NOT CONTAIN CONSTANT

 TOTAL EFFECTIVE ETAS (NIND*NETA):                           240


 #TERE:
 Elapsed estimation  time in seconds:     0.83
 Elapsed covariance  time in seconds:     0.34
 Elapsed postprocess time in seconds:     0.08

 ********************               FIRST ORDER CONDITIONAL ESTIMATION WITH INTERACTION              ********************
 #OBJT:**************                       MINIMUM VALUE OF OBJECTIVE FUNCTION                      ********************
 #OBJV:********************************************    -4126.115       **************************************************

 ********************               FIRST ORDER CONDITIONAL ESTIMATION WITH INTERACTION              ********************
 ********************                             FINAL PARAMETER ESTIMATE                           ********************

 THETA - VECTOR OF FIXED EFFECTS PARAMETERS   *********
         TH 1      TH 2      TH 3
         3.98E+00  6.82E+01  1.99E-01

 OMEGA - COV MATRIX FOR RANDOM EFFECTS - ETAS  ********
         ETA1      ETA2
 ETA1
+        7.16E-02
 ETA2
+        0.00E+00  9.22E-02

 SIGMA - COV MATRIX FOR RANDOM EFFECTS - EPSILONS  ****
         EPS1
 EPS1
+        1.00E+00

 OMEGA - CORR MATRIX FOR RANDOM EFFECTS - ETAS  *******
         ETA1      ETA2
 ETA1
+        2.67E-01
 ETA2
+        0.00E+00  3.04E-01

 SIGMA - CORR MATRIX FOR RANDOM EFFECTS - EPSILONS  ***
         EPS1
 EPS1
+        1.00E+00

 ********************               FIRST ORDER CONDITIONAL ESTIMATION WITH INTERACTION              ********************
 ********************                            STANDARD ERROR OF ESTIMATE                          ********************

 THETA - VECTOR OF FIXED EFFECTS PARAMETERS   *********
         TH 1      TH 2      TH 3
         9.90E-02  1.93E+00  2.80E-03

 OMEGA - COV MATRIX FOR RANDOM EFFECTS - ETAS  ********
         ETA1      ETA2
 ETA1
+        9.13E-03
 ETA2
+       .........  1.22E-02

 SIGMA - COV MATRIX FOR RANDOM EFFECTS - EPSILONS  ****
         EPS1
 EPS1
+       .........

 OMEGA - CORR MATRIX FOR RANDOM EFFECTS - ETAS  *******
         ETA1      ETA2
 ETA1
+        1.71E-02
 ETA2
+       .........  2.01E-02

 SIGMA - CORR MATRIX FOR RANDOM EFFECTS - EPSILONS  ***
         EPS1
 EPS1
+       .........

 ********************               FIRST ORDER CONDITIONAL ESTIMATION WITH INTERACTION              ********************
 ********************                          COVARIANCE MATRIX OF ESTIMATE                         ********************

            TH 1      TH 2      TH 3      OM11      OM12      OM22      SG11
 TH 1
+        9.80E-03
 TH 2
+        2.08E-02  3.72E+00
 TH 3
+        3.86E-07  6.66E-04  7.87E-06
 OM11
+        1.81E-05  5.51E-04  1.68E-06  8.33E-05
 OM12
+       ......... ......... ......... ......... .........
 OM22
+       -9.96E-05  8.12E-04 -2.61E-06 -2.55E-06 .........  1.49E-04
 SG11
+       ......... ......... ......... ......... ......... ......... .........

 ********************               FIRST ORDER CONDITIONAL ESTIMATION WITH INTERACTION              ********************
 ********************                          CORRELATION MATRIX OF ESTIMATE                        ********************

            TH 1      TH 2      TH 3      OM11      OM12      OM22      SG11
 TH 1
+        9.90E-02
 TH 2
+        1.09E-01  1.93E+00
 TH 3
+        1.39E-03  1.23E-01  2.80E-03
 OM11
+        2.01E-02  3.13E-02  6.56E-02  9.13E-03
 OM12
+       ......... ......... ......... ......... .........
 OM22
+       -8.25E-02  3.45E-02 -7.62E-02 -2.29E-02 .........  1.22E-02
 SG11
+       ......... ......... ......... ......... ......... ......... .........
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 Elapsed finaloutput time in seconds:     0.20
 #CPUT: Total CPU Time in Seconds,        7.266
